*Heading
** Job name: Job-12 Model name: Model-1
** Generated by: Abaqus/CAE 2023
*Preprint, echo=NO, model=NO, history=NO, contact=NO
**
** PARTS
**
*Part, name=Applicator
*Node
      1,           0.,           2.,  0.100000001
      2,           0.,   1.94999993,  0.100000001
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*Element, type=R3D4
 1,   1,   2,  43,  42
 2,   2,   3,  44,  43
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*Node
    124,           0.,           2., 0.0500000007
*Nset, nset=Applicator-RefPt_, internal
124,
*Elset, elset=Applicator, generate
  1,  80,   1
*End Part
**
*Part, name=Part-6
*Node
      1,           0.,           2.,  0.100000001
      2,           0.,           2.,           0.
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*Element, type=R3D4
  1,   1,  11, 237,  75
  2,  11,  12, 238, 237
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*Node
    957,        0.125,           2.,  0.100000001
*Nset, nset=Part-6-RefPt_, internal
957,
*Nset, nset=Set-rf-parti-6
 957,
*Nset, nset=Set-bottom
   4,   6,   9,  10,  62,  63
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*Elset, elset=Set-bottom, generate
 172,  189,    1
*Elset, elset=Part-6, generate
   1,  954,    1
*End Part
**
*Part, name=Water
*Node
      1,          10.,           2.,  0.100000001
      2,          10.,   1.95000005,  0.100000001
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*Element, type=EC3D8R
    1,   124,   125,   166,   165,     1,     2,    43,    42
    2,   125,   126,   167,   166,     2,     3,    44,    43
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*Nset, nset=Set-1, generate
     1,  24723,      1
*Elset, elset=Set-1, generate
     1,  16000,      1
*Nset, nset=Z
     1,     2,     3,     4,     5,     6
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*Elset, elset=Z, generate
     1,  16000,      1
*Nset, nset=X
     1,     2,     3,     4,     5,     6
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*Elset, elset=X
     1,     2,     3,     4,     5,     6
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*Nset, nset=Y
     1,    41,    42,    82,    83,   123
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*Elset, elset=Y
     1,    40,    41,    80,    81,   120
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** Section: Section-1
*Eulerian Section, elset=Set-1
Water, water-1
*Surface, type=EULERIAN MATERIAL, name=water-1
water-1
*End Part
**
**
** ASSEMBLY
**
*Assembly, name=Assembly
**
*Instance, name=Applicator-1, part=Applicator
*End Instance
**
*Instance, name=Water-1, part=Water
*End Instance
**
*Instance, name=Part-6-1, part=Part-6
        6.75,        0.125,           0.
*End Instance
**
*Node
      1,         6.75,        0.875,           0.
*Node
      2,         6.75,        0.875,  0.100000001
*Node
      3,           0.,           1.,  0.100000001
*Nset, nset=Set-2, instance=Applicator-1
 124,
*Nset, nset=Set-4, instance=Part-6-1
   4,   6,   9,  10,  62,  63
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*Elset, elset=Set-4, instance=Part-6-1, generate
 172,  189,    1
*Nset, nset=Set-5, instance=Part-6-1
 957,
*Nset, nset=Set-6, instance=Water-1, generate
     1,  24723,      1
*Nset, nset=Set-6, instance=Part-6-1
   2,   3,   4,   7,   8,   9
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*Elset, elset=Set-6, instance=Water-1, generate
     1,  16000,      1
*Elset, elset=Set-6, instance=Part-6-1
 190, 191, 192, 193, 194, 195
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*Nset, nset=Set-8
 1,
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*Elset, elset=Set-11, instance=Part-6-1, generate
 172,  954,    1
*Nset, nset=Set-12, instance=Water-1, generate
     1,  24723,      1
*Nset, nset=Set-12, instance=Part-6-1
   1,   2,   3,   4,   5,   6
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*Elset, elset=Set-12, instance=Water-1, generate
     1,  16000,      1
*Elset, elset=Set-12, instance=Part-6-1, generate
 172,  954,    1
*Nset, nset=Set-13, instance=Water-1, generate
     1,  24723,      1
*Elset, elset=Set-13, instance=Water-1, generate
     1,  16000,      1
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*Nset, nset=Set-21, instance=Part-6-1
 957,
*Nset, nset=_PickedSet14, internal, instance=Water-1, generate
     1,  24723,      1
*Elset, elset=_PickedSet14, internal, instance=Water-1, generate
     1,  16000,      1
*Elset, elset=_m_Surf-9_S3, internal, instance=Water-1
     1,     2,     3,     4,     5,     6
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*Surface, type=ELEMENT, name=m_Surf-9
_m_Surf-9_S3, S3
*Rigid Body, ref node=Applicator-1.Applicator-RefPt_, elset=Applicator-1.Applicator
*Rigid Body, ref node=Part-6-1.Part-6-RefPt_, elset=Part-6-1.Part-6
*End Assembly
*Amplitude, name=Amp-1, time=TOTAL TIME, definition=PERIODIC
1,              3.,              0.,              0.
             0.,              3.
*Amplitude, name=Amp-2
             0.,              0.,              1.,              1.
**
** MATERIALS
**
*Material, name=Material-Slab
*Density
28.,
*Elastic
 3.23e+08, 0.3
*Material, name=Water
*Density
1000.,
*Eos, type=USUP
1483.,0.,0.
*Viscosity
 0.0001,
**
** INTERACTION PROPERTIES
**
*Surface Interaction, name=IntProp-1
*Friction
 0.1,
*Surface Behavior, pressure-overclosure=HARD
*Surface Interaction, name=IntProp-2
*Friction
 0.2,
*Surface Behavior, pressure-overclosure=HARD
*Surface Interaction, name=IntProp-3
**
** BOUNDARY CONDITIONS
**
** Name: X Type: Velocity/Angular velocity
*Boundary, type=VELOCITY
Water-1.X, 1, 1
** Name: Y Type: Velocity/Angular velocity
*Boundary, type=VELOCITY
Water-1.Y, 2, 2
** Name: Z Type: Velocity/Angular velocity
*Boundary, type=VELOCITY
Water-1.Z, 3, 3
**
** PREDEFINED FIELDS
**
** Name: Predefined Field-1   Type: Material assignment
*Initial Conditions, type=VOLUME FRACTION
Water-1.22, Water-1.water-1, 1.
Water-1.23, Water-1.water-1, 1.
Water-1.24, Water-1.water-1, 1.
Water-1.25, Water-1.water-1, 1.
Water-1.26, Water-1.water-1, 1.
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Water-1.16000, Water-1.water-1, 1.
** ----------------------------------------------------------------
**
** STEP: Step-1
**
*Step, name=Step-1, nlgeom=YES
*Dynamic, Explicit
, 5.
*Bulk Viscosity
0.06, 1.2
**
** BOUNDARY CONDITIONS
**
** Name: BC-4 Type: Displacement/Rotation
*Boundary, amplitude=Amp-1
Set-2, 1, 1, 0.15
Set-2, 2, 2
Set-2, 3, 3
Set-2, 4, 4
Set-2, 5, 5
Set-2, 6, 6
** Name: BC-12 Type: Displacement/Rotation
*Boundary, amplitude=Amp-1
Set-21, 1, 1, 0.12
Set-21, 2, 2, 0.1
Set-21, 3, 3
Set-21, 4, 4
Set-21, 5, 5
Set-21, 6, 6
**
** LOADS
**
** Name: Load-1   Type: Gravity
*Dload
Set-13, GRAV, 0.98, 0., -1., 0.
**
** INTERACTIONS
**
** Interaction: Int-1
*Contact, op=NEW
*Contact Inclusions, ALL EXTERIOR
*Contact Property Assignment
 ,  , IntProp-1
**
** OUTPUT REQUESTS
**
*Restart, write, number interval=1, time marks=NO
**
** FIELD OUTPUT: F-Output-1
**
*Output, field, variable=PRESELECT, number interval=50
**
** HISTORY OUTPUT: H-Output-1
**
*Output, history, variable=PRESELECT
*End Step
